# OpenSim document version 30000
Model Wrist Model:
  credits: Gonzalez, R.V., Buchanan, T.S., Delp, S.L.
  length_units: meters
  force_units: N
  gravity: 0 0 0
  publications:
    How muscle architecture and moment arms affect wrist flexion-extension moments. Journal of Biomechanics, vol. 30, pp. 705-712, 1997.
  BodySet:
    Body ground: mass=0 [kg] mass_center=(0 0 0) inertia_xx=0 inertia_yy=0 inertia_zz=0 meshes=humerus.vtp
    Body ulna: mass=0.9827 mass_center=(0.0086 -0.0853 0.0216) inertia_xx=0.0048 inertia_yy=0.001 inertia_zz=0.0044
        inertia_xy=0.00028171 inertia_xz=-6.7703e-5 inertia_yz=0.0009706 meshes=ulna.vtp
      CustomJoint elbow: parent_body=ground location_in_parent=(0.0127 -0.274 0.0389) location=(0 0 0)
        Coordinate elbow_flexion: motion_type=rotational default_value=0 range=(0 2.268928) clamped=false locked=true
        SpatialTransform: axes_held_at_zero=(rotation2 rotation3 translation1 translation2 translation3)
          TransformAxis rotation1: coordinates=elbow_flexion axis=(0.2260469 0.1910399 0.9551997)
              LinearFunction(coefficients=1 0)
    Body radius: mass=0.2077 mass_center=(0.0299 -0.1614 0.0139)
        inertia=(0.00038999 7.8781e-5 0.000358 2.6803e-5 -3.7705e-6 5.7073e-5) meshes=radius.vtp
      CustomJoint radioulnar: parent_body=ulna location_in_parent=(-0.0065 -0.008 0.027) location=(0 0 0)
        SpatialTransform: axes_held_at_zero=(rotation1 rotation3 translation1 translation2 translation3)
          TransformAxis rotation2: coordinates=pro_sup axis=(0.05639802 0.9835774 -0.1714491)
              LinearFunction(coefficients=1 0)
        Coordinate pro_sup: motion_type=rotational default_value=0 range=(-1.570796 1.570796) clamped=false locked=true
    Body scaphoid: mass=0.2455 mass_center=(0 -0.045 0) inertia=(0.0001814 0.00013045 0.0002778 0 0 0)
        meshes=(r_scaph.vtp r_lun.vtp r_trpzm.vtp r_trpzd.vtp r_cap.vtp r_pis.vtp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)
      CustomJoint auxprfem-auxprrud: parent_body=radius location_in_parent=(-0.013 -0.2248 0.0651)
          orientation_in_parent=(0.139627 0.392699 0) location=(0 0 0)
        Coordinate deviation: motion_type=coupled default_value=0 range=(-0.4363323 0.6108652) clamped=false
            locked=true
        SpatialTransform: axes_held_at_zero=(rotation2 rotation3 translation1 translation2 translation3)
          TransformAxis rotation1: coordinates=deviation axis=(1 0 0)
            SimmSpline: x=(-0.436332 0 0.610865) y=(-0.163625 0 0.305433)
    Body Mphalanx1: mass=0.0202 mass_center=(0 -0.0176 0) inertia_xx=2.5527e-6 inertia_yy=9.2786e-7
        inertia_zz=2.5527e-6 meshes=movaxesfin76.stl
      CustomJoint MCP2M: parent_body=scaphoid location_in_parent=(-0.00854819 -0.0989736 0.028561)
          orientation_in_parent=(-0.3141595 0.174533 0.0872665) location=(0 0 0)
        Coordinate MCP2M_lateral: motion_type=rotational default_value=0 range=(-0.3490659 0.3490659) clamped=false
            locked=true
        Coordinate MCP2M_flex: motion_type=rotational default_value=0 range=(-0.1745329 1.570796) clamped=false
        SpatialTransform: axes_held_at_zero=(rotation2 translation1 translation2 translation3)
          TransformAxis rotation1: coordinates=MCP2M_lateral axis=(1 0 0) LinearFunction(coefficients=1 0)
          TransformAxis rotation3: coordinates=MCP2M_flex axis=(0 0 1) LinearFunction(coefficients=1 0)
    Body Mphalanx2: mass=0.0159 mass_center=(0 -0.0127 0) inertia_xx=1.1961e-6 inertia_yy=6.7755e-7 inertia_zz=1.961e-6
        meshes=movaxesfin623.stl
      CustomJoint MPIP: parent_body=Mphalanx1 location_in_parent=(-0.0002 -0.0559 0.007) location=(0 0 0)
        Coordinate MPIP_flex: motion_type=rotational default_value=0 range=(-0.08726646 1.570796) clamped=false
        SpatialTransform: axes_held_at_zero=(rotation1 rotation2 translation1 translation2 translation3)
          TransformAxis rotation3: coordinates=MPIP_flex axis=(0 0 1) LinearFunction(coefficients=1 0)
    Body Mphalanx3: mass=0.0119 mass_center=(0 -0.0071 0) inertia_xx=4.2792e-7 inertia_yy=4.5424e-7
        inertia_zz=4.2792e-7 meshes=movaxesfin515.stl
      CustomJoint MDIP: parent_body=Mphalanx2 location_in_parent=(0.00243 -0.03397 0.0018) location=(0 0 0)
        Coordinate MDIP_flex: motion_type=rotational default_value=0 range=(-0.08726646 1.570796) clamped=false
            locked=true
        SpatialTransform: axes_held_at_zero=(rotation1 rotation2 translation1 translation2 translation3)
          TransformAxis rotation3: coordinates=MDIP_flex axis=(0 0 1) LinearFunction(coefficients=1 0)
    Body Iphalanx1: mass=0.0163 mass_center=(0 -0.0169 0) inertia_xx=1.9255e-6 inertia_yy=7.4593e-7
        inertia_zz=1.9255e-6 meshes=fingers2.vtp
      CustomJoint MCP2: parent_body=scaphoid location_in_parent=(-0.00175658 -0.0868205 0.0536934)
          orientation_in_parent=(-0.226893 0.261799 0) location=(0 0 0)
        Coordinate MCP2_lateral: motion_type=rotational default_value=0 range=(-0.3490659 0.3490659) clamped=false
            locked=true
        Coordinate MCP2_flex: motion_type=rotational default_value=0 range=(-0.1745329 1.570796) clamped=false
        SpatialTransform: axes_held_at_zero=(rotation2 translation1 translation2 translation3)
          TransformAxis rotation1: coordinates=MCP2_lateral axis=(1 0 0) LinearFunction(coefficients=1 0)
          TransformAxis rotation3: coordinates=MCP2_flex axis=(0 0 1) LinearFunction(coefficients=1 0)
    Body Iphalanx2: mass=0.0139 mass_center=(0 -0.0122 0) inertia_xx=9.9e-7 inertia_yy=5.9287e-7 inertia_zz=9.9e-7
        meshes=fingers3.vtp
      CustomJoint PIP: parent_body=Iphalanx1 location_in_parent=(0.0005 -0.04826 0.00799) location=(0 0 0)
        Coordinate PIP_flex: motion_type=rotational default_value=0 range=(-0.08726646 1.570796) clamped=false
        SpatialTransform: axes_held_at_zero=(rotation1 rotation2 translation1 translation2 translation3)
          TransformAxis rotation3: coordinates=PIP_flex axis=(0 0 1) LinearFunction(coefficients=1 0)
    Body Iphalanx3: mass=0.0131 mass_center=(0 -0.0068 0) inertia_xx=4.5404e-7 inertia_yy=4.9967e-7
        inertia_zz=4.5404e-7 meshes=fingers4.vtp
      CustomJoint DIP: parent_body=Iphalanx2 location_in_parent=(0.00193 -0.03277 0.00472) location=(0 0 0)
        Coordinate DIP_flex: motion_type=rotational default_value=0 range=(-0.08726646 1.570796) clamped=false
            locked=true
        SpatialTransform: axes_held_at_zero=(rotation1 rotation2 translation1 translation2 translation3)
          TransformAxis rotation3: coordinates=DIP_flex axis=(0 0 1) LinearFunction(coefficients=1 0)
    Body thumb: mass=0.0198 mass_center=(0 -0.0277 0)) inertia_xx=5.5409e-6 inertia_yy=9.0978e-7 inertia_zz=5.5409e-6
        meshes=fingers17.vtp
      CustomJoint CMC1: parent_body=scaphoid location_in_parent=(0.0115 -0.002 0.0129)
          orientation_in_parent=(-0.401426 0 0) location=(0 0 0)
        Coordinate thumb_abd: motion_type=rotational default_value=0 range=(-0.7853982 0.2617994) clamped=false
            locked=true
        Coordinate thumb_flex: motion_type=rotational default_value=0 range=(-0.7853982 1.570796) clamped=false
            locked=true
        SpatialTransform: axes_held_at_zero=(rotation3 translation1 translation2 translation3)
          TransformAxis rotation1: coordinates=thumb_abd axis=(1 0 0) LinearFunction(coefficients=1 0)
          TransformAxis rotation2: coordinates=thumb_flex axis=(0.05639802 0.9835774 -0.1714491)
              LinearFunction(coefficients=1 0)
    Body Tphalanx1: mass=0.0179 mass_center=(0 -0.0183 0) inertia_xx=2.3722e-6 inertia_yy=7.6225e-7
        inertia_zz=2.3722e-6 meshes=fingers18mod61.vtp
      CustomJoint TCP2M: parent_body=thumb location_in_parent=(0.00267 -0.0305 0.04) location=(0 0 0)
        Coordinate TCP2M_lateral: motion_type=rotational default_value=0 range=(-0.3490659 0.3490659) clamped=false
            locked=true
        Coordinate TCP2M_flex: motion_type=rotational default_value=0 range=(0 1.396263) clamped=false locked=true
        SpatialTransform: axes_held_at_zero=(translation1 translation2 translation3)
          TransformAxis rotation1: coordinates=TCP2M_lateral axis=(1 0 0) LinearFunction(coefficients=1 0)
          TransformAxis rotation2: axis=(0 1 0) LinearFunction(coefficients=1 0)
          TransformAxis rotation3: coordinates=TCP2M_flex axis=(0 0.5 0.5) LinearFunction(coefficients=1 0)
    Body Tphalanx2: mass=0.0139 mass_center=(0 -0.013 0) inertia_xx=1.0449e-6 inertia_yy=5.2996e-7 inertia_zz=1.0449e-6
        meshes=fingers19mod13-24.vtp
      CustomJoint TCP2M2_flex: parent_body=Tphalanx1 location_in_parent=(-0.015 -0.033 0.024) location=(0 0 0)
        SpatialTransform: axes_held_at_zero=(rotation1 rotation2 translation1 translation2 translation3)
          TransformAxis rotation3: coordinates=TCP2M2_flex axis=(0 0.5 0.5) LinearFunction(coefficients=1 0)
        Coordinate TCP2M2_flex: motion_type=rotational default_value=0 range=(-0.08726646 1.570796) clamped=false
            locked=true
    Body Rphalanx1: mass=0.0143 mass_center=(0 -0.0165 0) inertia_xx=1.6303e-6 inertia_yy=6.5496e-7
        inertia_zz=1.6303e-6 meshes=movaxesfin117.stl
      CustomJoint RCP2M: parent_body=scaphoid location_in_parent=(-0.00748786 -0.102451 0.00803584)
          orientation_in_parent=(-0.3141595 0.174533 0.0872665) location=(0 0 0)
        Coordinate RCP2M_lateral: motion_type=rotational default_value=0 range=(-0.3490659 0.3490659) clamped=false
            locked=true
        Coordinate RCP2M_flex: motion_type=rotational default_value=0 range=(-0.1745329 1.570796) clamped=false
        SpatialTransform: axes_held_at_zero=(rotation2 translation1 translation2 translation3)
          TransformAxis rotation1: coordinates=RCP2M_lateral axis=(1 0 0) LinearFunction(coefficients=1 0)
          TransformAxis rotation3: coordinates=RCP2M_flex axis=(0 0 1) LinearFunction(coefficients=1 0)
    Body Rphalanx2: mass=0.0108 mass_center=(0 -0.012 0) inertia_xx=7.4684e-7 inertia_yy=4.6157e-7 inertia_zz=7.4684e-7
        meshes=movaxesfin104.stl
      CustomJoint RPIP: parent_body=Rphalanx1 location_in_parent=(0.003 -0.0559 0.01) location=(0 0 0)
        Coordinate RPIP_flex: motion_type=rotational default_value=0 range=(-0.08726646 1.570796) clamped=false
        SpatialTransform: axes_held_at_zero=(rotation1 rotation2 translation1 translation2 translation3)
          TransformAxis rotation3: coordinates=RPIP_flex axis=(0 0 1) LinearFunction(coefficients=1 0)
    Body Rphalanx3: mass=0.0093 mass_center=(0 -0.0067 0) inertia_xx=3.1688e-7 inertia_yy=3.5581e-7
        inertia_zz=3.1688e-7 meshes=movaxesfin91.stl
      CustomJoint RDIP: parent_body=Rphalanx2 location_in_parent=(0.00593 -0.03357 -0.00092) location=(0 0 0)
        Coordinate RDIP_flex: motion_type=rotational default_value=0 range=(-0.08726646 1.570796) clamped=false
            locked=true
        SpatialTransform: axes_held_at_zero=(rotation1 rotation2 translation1 translation2 translation3)
          TransformAxis rotation3: coordinates=RDIP_flex axis=(0 0 1) LinearFunction(coefficients=1 0)
    Body Lphalanx1: mass=0.0121 mass_center=(0 -0.0143 0) inertia_xx=1.097e-6 inertia_yy=5.5491e-7 inertia_zz=1.097e-6
        meshes=movaxesfin158.stl
      CustomJoint LCP2M: parent_body=scaphoid location_in_parent=(-0.0079632 -0.0970808 -0.0158901)
          orientation_in_parent=(-0.3141595 0.174533 0.0872665) location=(0 0 0)
        Coordinate LCP2M_lateral: motion_type=rotational default_value=0 range=(-0.3490659 0.3490659) clamped=false
            locked=true
        Coordinate LCP2M_flex: motion_type=rotational default_value=0 range=(-0.1745329 1.570796) clamped=false
        SpatialTransform: axes_held_at_zero=(rotation2 translation1 translation2 translation3)
          TransformAxis rotation1: coordinates=LCP2M_lateral axis=(1 0 0) LinearFunction(coefficients=1 0)
          TransformAxis rotation3: coordinates=LCP2M_flex axis=(0 0 1) LinearFunction(coefficients=1 0)
    Body Lphalanx2: mass=0.0073 mass_center=(0 -0.0103 0) inertia_xx=4.1684e-7 inertia_yy=3.1337e-7
        inertia_zz=4.1684e-7 meshes=movaxesfin143.stl
      CustomJoint LPIP: parent_body=Lphalanx1 location_in_parent=(0.001 -0.043 -0.008) location=(0 0 0)
        Coordinate LPIP_flex: motion_type=rotational default_value=0 range=(-0.08726646 1.570796) clamped=false
        SpatialTransform: axes_held_at_zero=(rotation1 rotation2 translation1 translation2 translation3)
          TransformAxis rotation3: coordinates=LPIP_flex axis=(0 0 1) LinearFunction(coefficients=1 0)
    Body Lphalanx3: mass=0.0067 mass_center=(0 -0.0058 0) inertia_xx=2.0336e-7 inertia_yy=2.5741e-7
        inertia_zz=2.0336e-7 meshes=movaxesfin133.stl
      CustomJoint LDIP: parent_body=Lphalanx2 location_in_parent=(0.002 -0.028 0.004) location=(0 0 0)
        Coordinate LDIP_flex: motion_type=rotational default_value=0 range=(-0.08726646 1.570796) clamped=false
            locked=true
        SpatialTransform: axes_held_at_zero=(rotation1 rotation2 translation1 translation2 translation3)
          TransformAxis rotation3: coordinates=LDIP_flex axis=(0 0 1) LinearFunction(coefficients=1 0)
    Body sphere: mass=0.1 mass_center=(0 0 0) inertia_xx=2.667e-7 inertia_yy=2.667e-7 inertia_zz=2.667e-7
        meshes=sphere.vtp
      CustomJoint CMC1: parent_body=radius location_in_parent=(0.0165648 -0.126 0.0241) location=(0 0 0)
        Coordinate Sp_rot_X: motion_type=rotational default_value=0 range=(0 6.28) clamped=false
        Coordinate Sp_rot_Y: motion_type=rotational default_value=0 range=(0 6.28) clamped=false
        Coordinate Sp_rot_Z: motion_type=rotational default_value=0 range=(0 6.28) clamped=false
        Coordinate Sp_tr_X: motion_type=translational default_value=0 range=(-10 10) clamped=false
        Coordinate Sp_tr_Y: motion_type=translational default_value=0 range=(-10 10) clamped=false
        Coordinate Sp_tr_Z: motion_type=translational default_value=0 range=(-10 10) clamped=false
        SpatialTransform:
          TransformAxis rotation1: coordinates=Sp_rot_X axis=(1 0 0) LinearFunction(coefficients=1 0)
          TransformAxis rotation2: coordinates=Sp_rot_Y axis=(0 1 0) LinearFunction(coefficients=1 0)
          TransformAxis rotation3: coordinates=Sp_rot_Z axis=(0 0 1) LinearFunction(coefficients=1 0)
          TransformAxis translation1: coordinates=Sp_tr_X axis=(1 0 0) LinearFunction(coefficients=1 0)
          TransformAxis translation2: coordinates=Sp_tr_Y axis=(0 1 0) LinearFunction(coefficients=1 0)
          TransformAxis translation3: coordinates=Sp_tr_Z axis=(0 0 1) LinearFunction(coefficients=1 0)
  ForceSet:
    Millard2012EquilibriumMuscle [values shared by the 5 below unless stated]: min_control=0.01 optimal_force=1
        max_contraction_velocity=10 activation_time_constant=0.01 [seconds] deactivation_time_constant=0.04 [seconds]
    Millard2012EquilibriumMuscle FDPR: max_isometric_force=51.6 optimal_fiber_length=0.0705 tendon_slack_length=0.31
        pennation_angle_at_optimal=0.1221731 [radians]
      PathPoint P1: sphere (0 0 0)
      PathPoint P2: radius (0.00438 -0.21834 0.03741)
      PathPoint P6: scaphoid (0.0111969 -0.0424643 0.000149834)
      PathPoint P7: scaphoid (0.00124734 -0.101679 0.0116973)
      PathPoint P8: Rphalanx1 (0.00494 -0.0506 0.00914)
      PathPoint P9: Rphalanx2 (0.0095 -0.03028 0.00343)
      PathPoint P10: Rphalanx3 (0.00820543 -0.0142621 0.00728736)
    Millard2012EquilibriumMuscle FDPI: max_isometric_force=65.7 optimal_fiber_length=0.064 tendon_slack_length=0.31
        pennation_angle_at_optimal=0.04363323
      PathPoint P1: sphere (0 0 0)
      PathPoint P2: radius (0.00797 -0.21647 0.04395)
      PathPoint P6: scaphoid (0.014134 -0.033158 0.00510546)
      PathPoint P7: scaphoid (0.00540129 -0.0862303 0.0518477)
      PathPoint P8: Iphalanx1 (0.00494 -0.0506 0.00914)
      PathPoint P9: Iphalanx2 (0.0095 -0.03028 0.00343)
      PathPoint P10: Iphalanx3 (0.01 -0.016 0.003)
    Millard2012EquilibriumMuscle FDPM: max_isometric_force=65.7 optimal_fiber_length=0.06 tendon_slack_length=0.317
        pennation_angle_at_optimal=0.04363323
      PathPoint P1: sphere (0 0 0)
      PathPoint P4: scaphoid (0.01025 -0.0128053 -0.00667891) range=(-1.5708 -0.436332)
      PathPoint P5: scaphoid (0.01246 -0.0213496 -0.00234581) range=(-1.5708 -0.174533)
      PathPoint P6: scaphoid (0.0132093 -0.0338552 0.00429335)
      PathPoint P7: scaphoid (0.002 -0.097 0.032)
      PathPoint P8: Mphalanx1 (0.00494 -0.0506 0.00914)
      PathPoint P9: Mphalanx2 (0.0095 -0.03028 0.00343)
      PathPoint P10: Mphalanx3 (0.01 -0.015 0.004)
    Millard2012EquilibriumMuscle FDPL: max_isometric_force=66 optimal_fiber_length=0.05 tendon_slack_length=0.296
        pennation_angle_at_optimal=0.1396263
      PathPoint P1: sphere (0 0 0)
      PathPoint P4: scaphoid (0.01324 -0.0112374 -0.00780036) range=(-1.5708 -0.436332)
      PathPoint P5: scaphoid (0.01729 -0.0206622 -0.0015911) range=(-1.5708 0.19984)
      PathPoint P6: scaphoid (0.0127158 -0.0449833 -0.00491316)
      PathPoint P7: scaphoid (0.0079781 -0.0990415 -0.0114628)
      PathPoint P8: Lphalanx1 (0.006 -0.051 0.005)
      PathPoint P9: Lphalanx2 (0.008 -0.027 0.015)
      PathPoint P10: Lphalanx3 (0.007 -0.016 0.011)
    Millard2012EquilibriumMuscle ECRL: max_isometric_force=65.7 optimal_fiber_length=0.048 tendon_slack_length=0.1013
        pennation_angle_at_optimal=0.04363323
      PathPoint P1: ground (0.01337 -0.26111 0.07069)
      PathPoint P2: ground (0.02239 -0.26834 0.06679)
      PathPoint P3: ground (0.023 -0.31 0.065)
      PathPoint P4: sphere (0 0 0)
    # Contact force properties for the sphere-plane pair.
    ElasticFoundationForce sphere1: transition_velocity=0
      ContactParametersSet:
        ContactParameters: geometry=(sphere_geo1 sphere_geo) stiffness=100e9 dissipation=10 static_friction=0
            dynamic_friction=0 viscous_friction=0
    ElasticFoundationForce sphere2: transition_velocity=0
      ContactParametersSet:
        ContactParameters: geometry=(sphere_geo2 sphere_geo) stiffness=100e9 dissipation=10 static_friction=0
            dynamic_friction=0 viscous_friction=0
    ElasticFoundationForce sphere3: transition_velocity=0
      ContactParametersSet:
        ContactParameters: geometry=(sphere_geo3 sphere_geo) stiffness=100e9 dissipation=10 static_friction=0
            dynamic_friction=0 viscous_friction=0
    ElasticFoundationForce sphere4: transition_velocity=0
      ContactParametersSet:
        ContactParameters: geometry=(sphere_geo4 sphere_geo) stiffness=100e9 dissipation=10 static_friction=0
            dynamic_friction=0 viscous_friction=0
  ContactGeometrySet:
    ContactMesh sphere_geo1: body_name=Rphalanx3 location=(0.00820543 -0.0142621 0.00728736) filename=sphere_new1.stl
    ContactMesh sphere_geo2: body_name=Iphalanx3 location=(0.00820543 -0.0142621 0.00728736) filename=sphere_new1.stl
    ContactMesh sphere_geo3: body_name=Mphalanx3 location=(0.01 -0.015 0.004) filename=sphere_new1.stl
    ContactMesh sphere_geo4: body_name=Lphalanx3 location=(0.007 -0.016 0.011) filename=sphere_new1.stl
    ContactMesh sphere_geo: body_name=scaphoid location=(0.0772403 -0.0655557 0.0233268) filename=sphere_new_scaled.stl
    # Add the contact_geometry_set_02.xml code here
